*HEADING Tower test case
*INCLUDE, INPUT=frame_tower.msh
**
** RHS 300x10 steel section
**
*BEAM SECTION, SECTION=GENERAL, DENSITY=7850., ELSET=Eall
0.0116, 0.0003256, 0.0001628, 0.0001628
0, 0, 1.
**
** Node 41 - 44 at base fixed
**
200E9, 80E9, 0.4
*NSET, NSET=Nfix
41,42,43,44
*NSET, NSET=Nfree, GENERATE
1,40
*BOUNDARY
Nfix, 1, 3
**
** Load case #1 - Horisontal load of 500000 in node 1 and gravity
**
*STEP
*STATIC
*CLOAD
1,1,500000.
*DLOAD
Eall,GRAV,9.8152,0.,0.,-1.
*NODE PRINT, TOTALS=ONLY, NSET=Nall
 U, RF
*NODE PRINT, TOTALS=YES, NSET=Nfree
 RF
*NODE PRINT, TOTALS=YES, NSET=Nfix
 RF
*NODE FILE
 U, RF
*END STEP
