*HEADING Tower test case
*INCLUDE, INPUT=truss_tower.msh
**
** RHS 300x10 steel section
**
*BEAM SECTION, SECTION=GENERAL, ELSET=Eall
0.0116, 0.0003256, 0.0001628, 0.0001628
0, 0, 1.
200E9, 80E9, 0.4
**
** Node 17 - 20 at base fixed
**
*BOUNDARY
17, 1, 3
18, 1, 3
19, 1, 3
20, 1, 3
**
** Load case #1 - Horisontal load of 500000 in node 1 and gravity
**
*STEP
*STATIC
*CLOAD
2,1,50000.
*NODE PRINT, TOTALS=YES, NSET=Nall
 U, RF
*NODE FILE
 U, RF
*EL PRINT, ELSET=Eall
 SF
*END STEP
